*Heading
** Job name: MAIN_PHROZEN1G Model name: MAIN_PHROZEN1G
** Generated by: Abaqus/CAE 2023
*Preprint, echo=NO, model=NO, history=NO, contact=NO
**
** ----------------------------------------------------------------
** $$$$$$$$$$$$$$$$$$           NOTES             $$$$$$$$$$$$$$$$$
** ----------------------------------------------------------------
**
** Units: mm/tonne/N/s/mJ/K
**
** ----------------------------------------------------------------
** $$$$$$$$$$$$$$$$$$           PARTS             $$$$$$$$$$$$$$$$$
** ----------------------------------------------------------------
**
*INCLUDE, input=phrozen1f_bistable_20000.inp
**
** ----------------------------------------------------------------
** $$$$$$$$$$$$$$$$$$         MATERIALS           $$$$$$$$$$$$$$$$$
** ----------------------------------------------------------------
**
*INCLUDE, INPUT=phrozen_linear_visco_Tref90C.inp
**
** ----------------------------------------------------------------
** $$$$$$$$$$$$$$$$$$        PARAMETERS           $$$$$$$$$$$$$$$$$
** ----------------------------------------------------------------
**
*PARAMETER
dt0       			= 0.0001
tend      			= 20500
dtmin     			= 1E-6
dtmax     			= 10
Tref      			= 273
T0        			= 298
Thot      			= 423
Tsurf     			= 298
Tsink               = 298
heat_time           = 2500
h                   = 0.001
disp1_mag           = 2.5
equilibration_dt0   = 0.001
equilibration_tend  = 3600
equilibration_dtmin = 1E-6
equilibration_dtmax = 10
disp2_mag           = -1*disp1_mag
**
** ----------------------------------------------------------------
** $$$$$$$$$$$$$$$$$$$$       ASSEMBLY          $$$$$$$$$$$$$$$$$$$
** ----------------------------------------------------------------
**
** ASSEMBLY
**
*Assembly, name=Assembly
**
*Instance, name=PART-1-1, part=PART-1
*End Instance
**
*Elset, elset=_OUTER_SURF_S1, internal, instance=PART-1-1
  801,  802,  803,  804,  805,  806
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*Elset, elset=_OUTER_SURF_S2, internal, instance=PART-1-1
    1,    2,    3,    4,    5,    6
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*Elset, elset=_OUTER_SURF_S3, internal, instance=PART-1-1
 121, 122, 123, 124, 125, 126
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*Elset, elset=_OUTER_SURF_S4, internal, instance=PART-1-1
  985,  991,  997, 1003, 1009, 1015
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*Elset, elset=_OUTER_SURF_S5, internal, instance=PART-1-1
    1,    2,    3,    4,    5,    6
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*Elset, elset=_OUTER_SURF_S6, internal, instance=PART-1-1
  990,  996, 1002, 1008, 1014, 1020
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*Elset, elset=_OUTER_SURF_S1_1, internal, instance=PART-1-1
  801,  802,  803,  804,  805,  806
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*Elset, elset=_OUTER_SURF_S2_1, internal, instance=PART-1-1
    1,    2,    3,    4,    5,    6
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*Elset, elset=_OUTER_SURF_S4_1, internal, instance=PART-1-1
  985,  991,  997, 1003, 1009, 1015
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*Elset, elset=_OUTER_SURF_S6_1, internal, instance=PART-1-1
  990,  996, 1002, 1008, 1014, 1020
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*Elset, elset=_OUTER_SURF_S3_1, internal, instance=PART-1-1
 121, 122, 123, 124, 125, 126
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*Elset, elset=_OUTER_SURF_S5_1, internal, instance=PART-1-1
    1,    2,    3,    4,    5,    6
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*Surface, type=ELEMENT, name=OUTER_SURF
_OUTER_SURF_S1_1, S1
_OUTER_SURF_S2_1, S2
_OUTER_SURF_S4_1, S4
_OUTER_SURF_S6_1, S6
_OUTER_SURF_S3_1, S3
_OUTER_SURF_S5_1, S5
*End Assembly
**
**
** ----------------------------------------------------------------
** $$$$$$$$$$$$$$$$$ THERMAL PROFILES FOR BCs $$$$$$$$$$$$$$$$$$$$$
** ----------------------------------------------------------------
*Amplitude, name=AMP-1
0,1
<tend>,1
** ----------------------------------------------------------------
** $$$$$$$$$$$$$$$$$$ HEAT TRANSFER PROPERTIES $$$$$$$$$$$$$$$$$$$$
** ----------------------------------------------------------------
**
*Film Property, name=INTPROP-1
<h>, 273.
<h>, 423.
**
** ----------------------------------------------------------------
** $$$$$$$$$$$$$$$$$$$$$ PHYSICAL CONSTANTS $$$$$$$$$$$$$$$$$$$$$$$
** ----------------------------------------------------------------
**
*Physical Constants, absolute zero=0.
**
** ----------------------------------------------------------------
** $$$$$$$$$$$$$$$$$$$$ BOUNDARY CONDITIONS $$$$$$$$$$$$$$$$$$$$$$$
** ----------------------------------------------------------------
**
** Name: Disp-BC-1 Type: Displacement/Rotation
*Boundary
PART-1-1.NS4, 1, 1
** Name: Disp-BC-2 Type: Displacement/Rotation
*Boundary
PART-1-1.NS4, 3, 3
** Name: Disp-BC-3 Type: Displacement/Rotation
*Boundary
PART-1-1.NS5, 2, 2
** Name: Disp-BC-4 Type: Displacement/Rotation
*Boundary
PART-1-1.NS5, 3, 3
**
** ----------------------------------------------------------------
** $$$$$$$$$$$$$$$$$$$$$  INITIAL CONDITIONS $$$$$$$$$$$$$$$$$$$$$$
** ----------------------------------------------------------------
**
** PREDEFINED FIELDS
**
** Name: Field-1   Type: Temperature
*Initial Conditions, type=TEMPERATURE
PART-1-1.ALLNODES, <T0>
**
** ----------------------------------------------------------------
** $$$$$$$$$$$$$$$$$$$$	     ANALYSIS     $$$$$$$$$$$$$$$$$$$$$$$$$
** ----------------------------------------------------------------
** --------------------STEP: heatup--------------------------------
**
*Step, name=heatup, nlgeom=YES, amplitude=RAMP, inc=100000
*Coupled Temperature-displacement, creep=explicit, deltmx=10.
0.001, <heat_time>, <dtmin>, <dtmax>
**
** BOUNDARY CONDITIONS
**
** Name: Disp-BC-1 Type: Displacement/Rotation
*Boundary, op=NEW
** Name: Disp-BC-2 Type: Displacement/Rotation
*Boundary, op=NEW
** Name: Disp-BC-3 Type: Displacement/Rotation
*Boundary, op=NEW
** Name: Disp-BC-4 Type: Displacement/Rotation
*Boundary, op=NEW
** Name: Disp-BC-5 Type: Displacement/Rotation
**
** -----------------------MECHANICAL BCS-----------------------------
**
*Boundary, op=NEW
PART-1-1.NS4, 1, 1
** Name: Disp-BC-6 Type: Displacement/Rotation
*Boundary, op=NEW
PART-1-1.NS4, 3, 3
** Name: Disp-BC-7 Type: Displacement/Rotation
*Boundary, op=NEW
PART-1-1.NS5, 2, 2
** Name: Disp-BC-8 Type: Displacement/Rotation
*Boundary, op=NEW
PART-1-1.NS5, 3, 3
**
** -----------------------THERMAL BCS--------------------------------
**
** Name: Temp-BC-1 Type: Temperature
*Boundary, op=NEW
PART-1-1.ALLNODES, 11, 11, <Thot>
**
** OUTPUT REQUESTS
**
*Restart, write, frequency=99
**
** FIELD OUTPUT: F-Output-1
**
*Output, field
*Contact Output
CDISP, CSTRESS
**
** FIELD OUTPUT: F-Output-2
**
*Node Output
CF, NT, RF, RFL, U
**
** FIELD OUTPUT: F-Output-3
**
*Element Output, directions=YES
HFL, LE, NFORC, PE, PEEQ, PEMAG, S, THE
**
** HISTORY OUTPUT: H-Output-1
**
*Output, history, variable=PRESELECT
*End Step
** ----------------------------------------------------------------
**
** ----------------- STEP: cooldown -------------------------------
**
*Step, name=cooldown, nlgeom=YES, amplitude=RAMP, inc=10000
*Coupled Temperature-displacement, creep=explicit, deltmx=10.
<dt0>, <tend>, <dtmin>, <dtmax>
**
** BOUNDARY CONDITIONS
**
** Name: Disp-BC-5 Type: Displacement/Rotation
*Boundary, op=NEW
** Name: Disp-BC-6 Type: Displacement/Rotation
*Boundary, op=NEW
** Name: Disp-BC-7 Type: Displacement/Rotation
*Boundary, op=NEW
** Name: Disp-BC-8 Type: Displacement/Rotation
*Boundary, op=NEW
** Name: Disp-BC-9 Type: Displacement/Rotation
*Boundary, op=NEW
**
** -----------------------MECHANICAL BCS-----------------------------
**
** $COMMENT: RE-ESTABLISH MECHNICAL BCs
PART-1-1.NS4, 1, 1
** Name: Disp-BC-10 Type: Displacement/Rotation
*Boundary, op=NEW
PART-1-1.NS4, 3, 3
** Name: Disp-BC-11 Type: Displacement/Rotation
*Boundary, op=NEW
PART-1-1.NS5, 2, 2
** Name: Disp-BC-12 Type: Displacement/Rotation
*Boundary, op=NEW
PART-1-1.NS5, 3, 3
** -----------------------REVISE THERMAL BCS-----------------------
** $COMMENT: TURN OFF FIXED TEMPERATURE
** Name: Temp-BC-1 Type: Temperature
*Boundary, op=NEW
**
** INTERACTIONS
**
** ----------------TURN ON CONVECTIVE THERMAL BCS--------------------
**
** Interaction: SURFFILM-1
*Sfilm, amplitude=AMP-1
OUTER_SURF, F, <Tsink>, INTPROP-1
**
** OUTPUT REQUESTS
**
*Restart, write, frequency=99
**
** FIELD OUTPUT: F-Output-4
**
*Output, field
*Contact Output
CDISP, CSTRESS
**
** FIELD OUTPUT: F-Output-5
**
*Node Output
CF, NT, RF, RFL, U
**
** FIELD OUTPUT: F-Output-6
**
*Element Output, directions=YES
HFL, LE, NFORC, PE, PEEQ, PEMAG, S, THE
**
** HISTORY OUTPUT: H-Output-2
**
*Output, history, variable=PRESELECT
*End Step
**----------------STEP 2: ACTUATE1--------------------
** STEP: actuate1
**
*Step, name=actuate1, nlgeom=YES, inc=1000
*Coupled Temperature-displacement, creep=none, steady state
0.01, 1, 1e-05, 0.01
**
** BOUNDARY CONDITIONS
**
*Boundary, op=NEW, AMPLITUDE=AMP-1
PART-1-1.ALLNODES, 11, 11, 298
** Name: actuate1_disp Type: Displacement/Rotation
*Boundary, op=NEW
** Name: apply +U1 displacement
PART-1-1.all_center_nodes, 1, 1, <disp1_mag>
** Name: fixed_frame Type: Displacement/Rotation
*Boundary, op=NEW
PART-1-1.all_outer_frame_nodes, 1, 1
PART-1-1.all_outer_frame_nodes, 2, 2
PART-1-1.all_outer_frame_nodes, 3, 3
**
** OUTPUT REQUESTS
**
*Restart, write, frequency=0
**
** FIELD OUTPUT: F-Output-1
**
*Output, field
*Contact Output
CDISP, CSTRESS
**
** FIELD OUTPUT: F-Output-2
**
*Node Output
CF, NT, RF, U
**
** FIELD OUTPUT: F-Output-3
**
*Element Output, directions=YES
LE, NFORC, PE, PEEQ, PEMAG, S, THE
**
** HISTORY OUTPUT: H-Output-1
**
*Output, history, variable=PRESELECT
*End Step
**----------------STEP 3: EQUILIBRATE--------------------
** STEP: equilibrate1
**
*Step, name=equilibrate1, nlgeom=YES, inc=1000
*Coupled Temperature-displacement, creep=explicit, deltmx=10
<equilibration_dt0>, <equilibration_tend>, <equilibration_dtmin>, <equilibration_dtmax>
**
** BOUNDARY CONDITIONS
**
*Boundary, op=NEW, AMPLITUDE=AMP-1
PART-1-1.ALLNODES, 11, 11, 298
**
** ---------------- Turn off prescribed displacement BC ----------------
**
** Name: actuate1_disp Type: Displacement/Rotation
*Boundary, op=NEW
**
** ---------------- Turn off fixed frame BCs ---------------------------
**
** Name: U1 fixed_frame Type: Displacement/Rotation
*Boundary, op=NEW
** Name: U2 fixed_frame Type: Displacement/Rotation
*Boundary, op=NEW
** Name: U3 fixed_frame Type: Displacement/Rotation
*Boundary, op=NEW
**
** ---------------- Reactivate fixed frame BCs -------------------------
**
** Name: fixed_frame Type: Displacement/Rotation
*Boundary, op=NEW
PART-1-1.all_outer_frame_nodes, 1, 1
PART-1-1.all_outer_frame_nodes, 2, 2
PART-1-1.all_outer_frame_nodes, 3, 3
**
** OUTPUT REQUESTS
**
*Restart, write, frequency=0
**
** FIELD OUTPUT: F-Output-1
**
*Output, field
*Contact Output
CDISP, CSTRESS
**
** FIELD OUTPUT: F-Output-2
**
*Node Output
CF, NT, RF, U
**
** FIELD OUTPUT: F-Output-3
**
*Element Output, directions=YES
LE, NFORC, PE, PEEQ, PEMAG, S, THE
**
** HISTORY OUTPUT: H-Output-1
**
*Output, history, variable=PRESELECT
*End Step
**----------------STEP 4: ACTUATE1--------------------
** STEP: actuate2
**
*Step, name=actuate2, nlgeom=YES, inc=1000
*Coupled Temperature-displacement, creep=none, steady state
0.01, 1, 1e-05, 0.01
**
** BOUNDARY CONDITIONS
**
*Boundary, op=NEW, AMPLITUDE=AMP-1
PART-1-1.ALLNODES, 11, 11, 298
** Name: actuate1_disp Type: Displacement/Rotation
*Boundary, op=NEW
** Name: apply +U1 displacement
PART-1-1.all_center_nodes, 1, 1, <disp2_mag>
** Name: fixed_frame Type: Displacement/Rotation
*Boundary, op=NEW
PART-1-1.all_outer_frame_nodes, 1, 1
PART-1-1.all_outer_frame_nodes, 2, 2
PART-1-1.all_outer_frame_nodes, 3, 3
**
** OUTPUT REQUESTS
**
*Restart, write, frequency=0
**
** FIELD OUTPUT: F-Output-1
**
*Output, field
*Contact Output
CDISP, CSTRESS
**
** FIELD OUTPUT: F-Output-2
**
*Node Output
CF, NT, RF, U
**
** FIELD OUTPUT: F-Output-3
**
*Element Output, directions=YES
LE, NFORC, PE, PEEQ, PEMAG, S, THE
**
** HISTORY OUTPUT: H-Output-1
**
*Output, history, variable=PRESELECT
*End Step
**----------------STEP 5: EQUILIBRATE--------------------
** STEP: equilibrate2
**
*Step, name=equilibrate2, nlgeom=YES, inc=1000
*Coupled Temperature-displacement, creep=explicit, deltmx=10
<equilibration_dt0>, <equilibration_tend>, <equilibration_dtmin>, <equilibration_dtmax>
**
** BOUNDARY CONDITIONS
**
*Boundary, op=NEW, AMPLITUDE=AMP-1
PART-1-1.ALLNODES, 11, 11, 298
**
** ---------------- Turn off prescribed displacement BC
**
** Name: actuate1_disp Type: Displacement/Rotation
*Boundary, op=NEW
**
** ---------------- Turn off fixed frame BCs
**
** Name: U1 fixed_frame Type: Displacement/Rotation
*Boundary, op=NEW
** Name: U2 fixed_frame Type: Displacement/Rotation
*Boundary, op=NEW
** Name: U3 fixed_frame Type: Displacement/Rotation
*Boundary, op=NEW
**
** ---------------- Reactivate fixed frame BCs
**
** Name: fixed_frame Type: Displacement/Rotation
*Boundary, op=NEW
PART-1-1.all_outer_frame_nodes, 1, 1
PART-1-1.all_outer_frame_nodes, 2, 2
PART-1-1.all_outer_frame_nodes, 3, 3
**
** OUTPUT REQUESTS
**
*Restart, write, frequency=0
**
** FIELD OUTPUT: F-Output-1
**
*Output, field
*Contact Output
CDISP, CSTRESS
**
** FIELD OUTPUT: F-Output-2
**
*Node Output
CF, NT, RF, U
**
** FIELD OUTPUT: F-Output-3
**
*Element Output, directions=YES
LE, NFORC, PE, PEEQ, PEMAG, S, THE
**
** HISTORY OUTPUT: H-Output-1
**
*Output, history, variable=PRESELECT
*End Step
